<?xml version="1.0" encoding="ISO-8859-1"?>
<neuroml xmlns="http://www.neuroml.org/schema/neuroml2" xmlns:xsi="http://www.w3.org/2001/XMLSchema-instance" xsi:schemaLocation="http://www.neuroml.org/schema/neuroml2 https://raw.github.com/NeuroML/NeuroML2/development/Schemas/NeuroML2/NeuroML_v2beta4.xsd" id="NeuroML_ionChannel">

    <notes>NeuroML file containing a single ion channel</notes>

    <ionChannel id="IKCa" conductance="1pS" type="ionChannelHH" species="k">

        <notes>Ca++ activated mAHP K+ channel description (from Moczydlowski and Latorre 1983 - modeled by Poirazi 2003 modified by Lawrence 2006)</notes>

        <gateHHrates id="o" instances="1">
            <forwardRate type="Lawrence2006_IKCa_alphao"/>
            <reverseRate type="Lawrence2006_IKCa_betao"/>
        </gateHHrates>

    </ionChannel>

    <ComponentType name="Lawrence2006_IKCa_alphao"
            extends="baseVoltageConcDepRate"
            description="forward rate to describe IKCa in Lawrence 2006">

        <Requirement name="temperature" dimension="temperature"/>

        <Constant name="R" dimension="idealGasConstantDims" value="8.3144621 J_per_K_per_mol"/>
        <Constant name="zCa" dimension="none" value="2"/>
        <Constant name="F" dimension="charge_per_mole" value="96485.3 C_per_mol"/>
        <Constant name="TIME_SCALE" dimension="time" value="1 ms"/>
        <Constant name="CONC_SCALE" dimension="concentration" value="1 mM"/>

        <Dynamics>
            <DerivedVariable name="ca_conc_i" dimension="none" value="caConc / CONC_SCALE"/>

            <DerivedVariable name="K" dimension="per_voltage" value="(zCa * 0.84 * F) / (R * temperature)"/>
            <DerivedVariable name="volt_dep" dimension="none" value="4.8e-04 * exp(-K * v)"/>
            <ConditionalDerivedVariable name="r" extends="r" dimension="per_time">
                <Case condition="volt_dep .neq. 0." value="((0.28*ca_conc_i) / (ca_conc_i + volt_dep)) / TIME_SCALE"/>
                <Case condition="volt_dep .eq. 0." value="0 / TIME_SCALE"/>
            </ConditionalDerivedVariable>

        </Dynamics>

    </ComponentType>

    <ComponentType name="Lawrence2006_IKCa_betao"
            extends="baseVoltageConcDepRate"
            description="reverse rate to describe IKCa in Lawrence 2006">

        <Requirement name="temperature" dimension="temperature"/>

        <Constant name="R" dimension="idealGasConstantDims" value="8.3144621 J_per_K_per_mol"/>
        <Constant name="zCa" dimension="none" value="2"/>
        <Constant name="F" dimension="charge_per_mole" value="96485.3 C_per_mol"/>
        <Constant name="TIME_SCALE" dimension="time" value="1 ms"/>
        <Constant name="CONC_SCALE" dimension="concentration" value="1 mM"/>

        <Dynamics>
            <DerivedVariable name="ca_conc_i" dimension="none" value="caConc / CONC_SCALE"/>

            <DerivedVariable name="K" dimension="per_voltage" value="(zCa * F) / (R * temperature)"/>
            <DerivedVariable name="volt_dep" dimension="none" value="1.3e-07 * exp(-K * v)"/>

            <ConditionalDerivedVariable name="r" extends="r" dimension="per_time">
                <Case condition="volt_dep .neq. 0." value="(0.48 / (1.0 + (ca_conc_i/volt_dep))) / TIME_SCALE"/>
                <Case condition="volt_dep .eq. 0." value="0.48 / TIME_SCALE"/>
            </ConditionalDerivedVariable>

        </Dynamics>

    </ComponentType>

</neuroml>
