<neuroml xmlns="http://www.neuroml.org/schema/neuroml2"  xmlns:xs="http://www.w3.org/2001/XMLSchema" xmlns:xsi="http://www.w3.org/2001/XMLSchema-instance" xsi:schemaLocation="http://www.neuroml.org/schema/neuroml2 https://raw.github.com/NeuroML/NeuroML2/development/Schemas/NeuroML2/NeuroML_v2beta4.xsd" id="NeuroML2_file_exported_from_NEURON">

    <include href="Capool.channel.nml"/>
    <include href="ICaL.channel.nml"/>
    <include href="ICaT.channel.nml"/>
    <include href="IKCa.channel.nml"/>
    <include href="IKa.channel.nml"/>
    <include href="IMmintau.channel.nml"/>
    <include href="Ih.channel.nml"/>
    <include href="Ikdrf.channel.nml"/>
    <include href="Ikdrs.channel.nml"/>
    <include href="Nadend.channel.nml"/>
    <include href="Nasoma.channel.nml"/>
    <include href="Kleak_chan.channel.nml"/>
    <include href="leak_chan.channel.nml"/>

    <cell id="LawrenceOLM">
        <morphology id="morphology">
            <segment id="0" name="Seg0_soma_0">
                <proximal x="1.382000e+02" y="2.249000e+02" z="1.000000e-02" diameter="5.870000e+00"/>
                <distal x="1.382000e+02" y="2.249000e+02" z="-1.000000e-02" diameter="5.870000e+00"/>
            </segment>
            <segment id="39" name="Seg0_dendrite_2">
                <parent segment="0" fractionAlong="1"/>
                <proximal x="1.382000e+02" y="2.249000e+02" z="-1.000000e-02" diameter="5.870000e+00"/>
                <distal x="1.336000e+02" y="2.282000e+02" z="7.300000e-01" diameter="3.520000e+00"/>
            </segment>
            <segment id="13" name="Seg0_dendrite_1">
                <parent segment="0" fractionAlong="1"/>
                <proximal x="1.382000e+02" y="2.249000e+02" z="-1.000000e-02" diameter="5.870000e+00"/>
                <distal x="1.332000e+02" y="2.245000e+02" z="6.300000e-01" diameter="4.690000e+00"/>
            </segment>
            <segment id="14" name="Seg1_dendrite_1">
                <parent segment="13" fractionAlong="1"/>
                <distal x="1.301000e+02" y="2.247000e+02" z="-2.300000e-01" diameter="3.860000e+00"/>
            </segment>
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            <segmentGroup neuroLexId="sao864921383" id="soma_0">
                <notes>This group contains an unbranched set of segments, and all of the segmentGroups marked with
             neuroLexId = sao864921383 form a non-overlapping set of all of the segments.
             These segmentGroups correspond to the 'cables' of NeuroML v1.8.1, and map to/from NEURON sections.</notes>
                <member segment="0"/>
            </segmentGroup>
            <segmentGroup neuroLexId="sao864921383" id="dendrite_2">
                <notes>This group contains an unbranched set of segments, and all of the segmentGroups marked with
             neuroLexId = sao864921383 form a non-overlapping set of all of the segments.
             These segmentGroups correspond to the 'cables' of NeuroML v1.8.1, and map to/from NEURON sections.</notes>
                <member segment="39"/>
            </segmentGroup>
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
            <segmentGroup id="all">
                <include segmentGroup="soma_0"/>
                <include segmentGroup="dendrite_2"/>
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            </segmentGroup>

            <segmentGroup id="soma_group">
                <include segmentGroup="soma_0"/>
                <include segmentGroup="soma_1"/>
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            </segmentGroup>

            <segmentGroup id="dendrite_group">
                <include segmentGroup="dendrite_2"/>
                <include segmentGroup="dendrite_1"/>
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            </segmentGroup>

            <segmentGroup id="IM_group">  <!-- soma + some of the dendrites whose have M current-->
                <include segmentGroup="soma_0"/>
                <include segmentGroup="dendrite_2"/>
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            </segmentGroup>

            <segmentGroup id="axon_group">
                <include segmentGroup="axon_0"/>
                <include segmentGroup="axon_1"/>
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            </segmentGroup>

        </morphology>

        <!-- Biophysical properties -->
        <biophysicalProperties id="biophys">

            <membraneProperties>

                <channelDensity id="leak_soma_group" ionChannel="leak_chan" condDensity="0.011231mS_per_cm2" segmentGroup="soma_group" erev="-66.164mV" ion="non_specific"/>
                <channelDensity id="leak_dendrite_group" ionChannel="leak_chan" condDensity="0.011231mS_per_cm2" segmentGroup="dendrite_group" erev="-66.164mV" ion="non_specific"/>
                <channelDensity id="leak_axon_group" ionChannel="leak_chan" condDensity="0.061771mS_per_cm2" segmentGroup="axon_group" erev="-66.164mV" ion="non_specific"/>
                <channelDensity id="Kleak_soma_group" ionChannel="Kleak_chan" condDensity="0.0032258mS_per_cm2" segmentGroup="soma_group" erev="-95mV" ion="k"/>
                <channelDensity id="Kleak_dendrite_group" ionChannel="Kleak_chan" condDensity="0.0032258mS_per_cm2" segmentGroup="dendrite_group" erev="-95mV" ion="k"/>
                <channelDensity id="Kleak_axon_group" ionChannel="Kleak_chan" condDensity="0.017742mS_per_cm2" segmentGroup="axon_group" erev="-95mV" ion="k"/>
                <channelDensityGHK2 id="ICaL_dendrite_group" ionChannel="ICaL" condDensity="2.5mS_per_cm2" segmentGroup="dendrite_group" ion="ca"/>
                <channelDensityGHK2 id="ICaT_dendrite_group" ionChannel="ICaT" condDensity="0.25mS_per_cm2" segmentGroup="dendrite_group" ion="ca"/>
                <channelDensity id="IKCa_dendrite_group" ionChannel="IKCa" condDensity="0.55mS_per_cm2" segmentGroup="dendrite_group" erev="-95mV"  ion="k"/>
                <channelDensity id="IKa_soma_group" ionChannel="IKa" condDensity="0.25mS_per_cm2" segmentGroup="soma_group" erev="-95mV" ion="k"/>
                <channelDensity id="IKa_dendrite_group" ionChannel="IKa" condDensity="0.25mS_per_cm2" segmentGroup="dendrite_group" erev="-95mV" ion="k"/>
                <channelDensity id="IM_IM_group" ionChannel="IMmintau" condDensity="0.3mS_per_cm2" segmentGroup="IM_group" erev="-95mV" ion="k"/>
                <channelDensity id="Ih_soma_group" ionChannel="Ih" condDensity="0.05mS_per_cm2" segmentGroup="soma_group" erev="-32mV" ion="h"/>
                <channelDensity id="Ikdrf_all" ionChannel="Ikdrf" condDensity="0.6mS_per_cm2" segmentGroup="all" erev="-95mV" ion="k"/>
                <channelDensity id="Ikdrs_all" ionChannel="Ikdrs" condDensity="0.23mS_per_cm2" segmentGroup="all" erev="-95mV" ion="k"/>
                <channelDensity id="Nasoma_soma_group" ionChannel="Nasoma" condDensity="10.7mS_per_cm2" segmentGroup="soma_group" erev="90mV" ion="na"/>
                <channelDensity id="Nadend_dendrite_group" ionChannel="Nadend" condDensity="11.7mS_per_cm2" segmentGroup="dendrite_group" erev="90mV" ion="na"/>
                <channelDensity id="Nasoma_axon_group" ionChannel="Nasoma" condDensity="11.7mS_per_cm2" segmentGroup="axon_group" erev="90mV" ion="na"/>
                <spikeThresh value="0mV"/>
                <specificCapacitance value="0.9uF_per_cm2"/>
                <initMembPotential value="-65mV"/>

            </membraneProperties>

            <intracellularProperties>
                <!--
                <species id="capool" concentrationModel="capool_diam_1_87669438445" segmentGroup="dendrite_group"
                         ion="ca" initialConcentration="5e-6mM" initialExtConcentration="2mM"/>
                -->
                <species id="fixCapool" concentrationModel="fixedCapool" segmentGroup="dendrite_group"
                         ion="ca" initialConcentration="5e-5mM" initialExtConcentration="2mM"/>
                <resistivity value="0.3kohm_cm"/>
            </intracellularProperties>

        </biophysicalProperties>

    </cell>

</neuroml>
